# лаба 3
# 1ое задание:----------------------------------------------------------------------------------------------
# 1ое подзадание:------------------------------------------------------------------------------------------
A := [1, 1, 0; 2, -2, 3; 4, 1, 3]
B := [1, 0, 0; 0, 1, 0; 0, 0, 1]
C := [-1, 3, 2; 1, 0, 4; 5, 7, 1]
D := A + (B + C)^-1*C = [2.44828, 0.862069, -0.172414; 1.68966, -0.827586, 2.96552; 3.96552, 0.741379, 4.05172]
# 2ое подзадание:------------------------------------------------------------------------------------------
b1 := [2, -2, 1]
b2 := [-1, -1, 7]
b3 := [1, -4, 2]
A1 := [2, -2, 1; -1, -1, 7; 1, -4, 2]
B1 := [4; 16; -3]
# метод обратной матрицы:------------------------------------------------------------------------------
A1^-1*B1 = [3.66667; 3.30769; 3.28205]
# метод крамера:-------------------------------------------------------------------------------------------
det_A := det(A1) = 39
x1 := det([4, -2, 1; 16, -1, 7; -3, -4, 2])/det_A = 3.66667
x2 := det([2, 4, 1; -1, 16, 7; 1, -3, 2])/det_A = 3.30769
x3 := det([2, -2, 4; -1, -1, 16; 1, -4, -3])/det_A = 3.28205
X := [x1; x2; x3] = [3.66667; 3.30769; 3.28205]
# метод lsolve():---------------------------------------------------------------------------------------------
lsolve(A1, B1) = [3.66667; 3.30769; 3.28205]
f(x) := A1*transpose(x)
# given:--------------------------------------------------------------------------------------------------------
solve block
    # guess values
    x := [1, 2, 3]
    # constraints
    f(x) == B1
    # solver
    transpose(find(x)) = [3.66667; 3.30769; 3.28205]
end solve block
# 3ее подзадание:------------------------------------------------------------------------------------------
W := [3, 2, 1]
V := [0; 2; 1]
B := [4, 2, 9, 1, 3; 2.6, 1.9, 0.4, 8, 3.7; 15, 6, 2.6, 5, 0]
A := [5, 8; 3, 4; 0, 0; 6, 1; 5, 8]
# ---------------------------------------------------------------------------------------------------------------
V*W = [0, 0, 0; 6, 4, 2; 3, 2, 1]
transpose(B)*V = [20.2; 9.8; 3.4; 21; 7.4]
W*V = 5
W*B = [32.2, 15.8, 30.4, 24, 16.4]
transpose(V)*B = [20.2, 9.8, 3.4, 21, 7.4]
B*A = [47, 65; 85.2, 66; 123, 149]
# 2ое задание:-----------------------------------------------------------------------------------------------
# 1ое подзадание:------------------------------------------------------------------------------------------
h1 := 0.5
r1 := 3
r2 := 6
i := r1, r1 + h1 .. r2 = [3; 3.5; 4; 4.5; 5; 5.5; 6]
x_i := i
y_i := x_i^3/3*e^(-x_i^2) = 0.00118153
f(x) := x_i^3/3*e^(-x_i^2)
# [plot: y_i, f(x) vs x_i, x]
# 2ое подзадание:------------------------------------------------------------------------------------------
h1 := 0.2
r1 := -5
r2 := 5
i := r1, r1 + h1 .. r2 = [
    -5; -4.8; -4.6; -4.4; -4.2; -4; -3.8; -3.6; -3.4; -3.2
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]
x_i := i
y_i := sin(x_i^2) = [
    -0.132352; -0.866851; 0.738706; 0.488565; -0.935459; -0.287903; 0.954495; 0.383543; -0.844896; -0.727878
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]
f(x) := sin(x^2)
# [plot: f(x), y_i vs x, x_i]
# 3ее задание:-----------------------------------------------------------------------------------------------
# 1ое подзадание:------------------------------------------------------------------------------------------
h1 := 1
r1 := -4
r2 := 4
i := r1, r1 + h1 .. r2 = [-4; -3; -2; -1; 0; 1; 2; 3; 4]
x_i := i
y_i := 1/(1 + x_i^2) = [0.0588235; 0.1; 0.2; 0.5; 1; 0.5; 0.2; 0.1; 0.0588235]
j := r1, r1 + h1 .. r2 = [-4; -3; -2; -1; 0; 1; 2; 3; 4]
x_j := j
n := length(x_i)
f(xa) := sum(y_i*product(if(i ≠ j, (xa - x_j)/(x_i - x_j), 1), j = 1 .. n), i = 1 .. n)
# [plot: f(ax), y_i vs x, x_i]
